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# [reference: DEELib 0306 M15.xmcd]
# Template
ORIGIN := 1
# Gyrotime from B calculations
# Rich Messeder
ω_gyro := |q_e|*B/m_e  # error: This variable is undefined.
τ_beam := 2*π/ω_gyro  # error: This variable is undefined.
BeamRadius := m_e*v_e/(|q_e|*B)  # error: This variable is undefined.
# 2013.01.20
m_e = 9.10938e-31 kg
q_e = -1.60218e-19 C
q := |q_e|
# Electron rest mass energy
E_e0 := 0.510998910*MeV
# ∇∂ ∂ ≈ ± ∴ ∵ ⇒ ⇔ ⊥ || ℙ
18755373*m*s^-1/c = 0.0625612
# 1 keV | Non-relativistic electron speed | Relativistic electron speed
v_e := sqrt(2*1.0*keV/m_e) = 18755373 m*s^-1
v_er := c*sqrt(1 - (E_e0/(E_e0 + 1.0*keV))^2) = 18727897 m*s^-1
# Chapter Head
# Column Head
# Heading 1
# Heading 2
# List bullet
# List Custom
# List Number
# Normal
# Normal - indent
# Section Title
# vectors for vector math rules
18727897./18755373 = 0.998535
A := [1; 4; 7]
B := [2; 5; 8]
C := [3; 6; 9]
# Gamma for 1 keV electron | Conversion constant from nT to μs
γ_1k := 1/sqrt(1 - v_er^2/c^2) = 1.00196
nT2μs := γ_1k*2*π*m_e/q = 35793.8 nT*μs
nT2μs/(100*nT) = 357.938 μs
B == 2*π*m_e/(q*τ_g)
dB == -2*π*m_e/q*1/τ_g^2*dτ_g
# 500 eV | Non-relativistic electron speed | Relativistic electron speed
# For some...
dB := 20*nT
τ_g := 141 μs
v_e := sqrt(2*0.5*keV/m_e) = 13262052 m*s^-1
v_er := c*sqrt(1 - (E_e0/(E_e0 + 0.5*keV))^2) = 13252328 m*s^-1
dB*q/(2*π*m_e)*τ_g^2 = 11.1304 μs  # <<< This is dTg, not Tg.
13252328./13262052. = 0.999267
# Gamma for 500 eV electron | Conversion constant from nT to μs
γ_500 := 1/sqrt(1 - v_er^2/c^2) = 1.00098
nT2μs := γ_500*2*π*m_e/q = 35758.8 nT*μs
nT2μs/(100*nT) = 357.588 μs
γ_1k/γ_500 = 1.00098
